<Lems>

    <Target component="sim1" />

    <!-- Include core NeuroML2 ComponentType definitions -->
    <Include file="Cells.xml" />
    <Include file="Networks.xml" />
    <Include file="Simulation.xml" />

    <Include file="RateBased.xml" />

    <Include file="Prototypes.xml" />
    <Include file="NoisyCurrentSource.xml" />

    <network id="net1">

        <population id="l23ePop" component="L23_E" size="1" />
        <population id="l23iPop" component="L23_I" size="1" />

        <population id="l56ePop" component="L56_E" size="1" />
        <population id="l56iPop" component="L56_I" size="1" />

        <explicitInput target="l23ePop[0]" input="noiseL23_E" destination="synapses"/>
        <explicitInput target="l23iPop[0]" input="noiseL23_I" destination="synapses"/>
        <explicitInput target="l56ePop[0]" input="noiseL56_E" destination="synapses"/>
        <explicitInput target="l56iPop[0]" input="noiseL56_I" destination="synapses"/>

    </network>

    <!-- End of NeuroML2 content -->

    <Simulation id="sim1" length="300ms" step="0.01ms" target="net1">

        <Display id="d3" title="Rates" timeScale="1s" xmin="-20" xmax="320" ymin="-1" ymax="11">
            <Line id="L23 E" quantity="l23ePop[0]/r" scale="1Hz" color="#0000ff" timeScale="1ms" />
            <Line id="L23 I" quantity="l23iPop[0]/r" scale="1Hz" color="#ff0000" timeScale="1ms" />
            <Line id="L56 E" quantity="l56ePop[0]/r" scale="1Hz" color="#00ffff" timeScale="1ms" />
            <Line id="L56 I" quantity="l56iPop[0]/r" scale="1Hz" color="#ff00ff" timeScale="1ms" />
        </Display>

        <Display id="d1" title="Inputs" timeScale="1s" xmin="-20" xmax="320" ymin="-1" ymax="11">
            <Line id="isyn l23 e" quantity="l23ePop[0]/iSyn" scale="1nA" color="#0000ff" timeScale="1ms" />
            <Line id="phi l23 e" quantity="l23ePop[0]/phi" scale="1" color="#3333ff" timeScale="1ms" />

            <!--<Line id="isyn i" quantity="iPop[0]/iSyn" scale="1nA" color="#ff0000" timeScale="1ms" />
            <Line id="phi i" quantity="iPop[0]/phi" scale="1" color="#ff7777" timeScale="1ms" />-->
        </Display>
        <!--
        <Display id="v" title="Volts?" timeScale="1s" xmin="-20" xmax="220" ymin="-1" ymax="11">
            <Line id="v e" quantity="ePop[0]/v" scale="1mV" color="#0000ff" timeScale="1ms" />
            <Line id="v i" quantity="iPop[0]/v" scale="1mV" color="#ff0000" timeScale="1ms" />
        </Display>

        <OutputFile id="of1" fileName="rates.dat">
            <OutputColumn id="el" quantity="ePop[0]/r"/>
            <OutputColumn id="il" quantity="iPop[0]/r"/>
        </OutputFile> -->

    </Simulation>

</Lems>
